// COMSOL Multiphysics 5.6.0.401 model "dual_circular_coil_axisymmetric.mph"
// Outline of the model tree

Parameters
  r_coil = 2.5 [mm]  // Coil wire radius
  R_coil = 20 [mm]  // Coil radius
  h_coil = 10[mm]  // Coil - plate distance
  R_plate = 40 [mm]  // Plate radius
  t_plate = 5 [mm]  // Plate thickness
  R_air = 60 [mm]  // Domain radius
  R_inf = 70 [mm]  // Inf air radius
  f = 250 [kHz]  // Excitation frequency
  I = 1 [A]  // Coil current
  sigma = 3 [kS/m]
  mu_r = 1
  delta = 1/(sqrt(pi*f*sigma*mu_r*mu0_const))  // Skin depth

Coordinate systems
  ie1: InfiniteElement "Infinite Element Domain 1" on domains 3

Geometry
  geom1 "Geometry" (2D axisymmetric, length unit m)
    c1: Circle | pos = {R_coil, h_coil}; r = r_coil
    r1: Rectangle | size = {R_plate, t_plate/2}
    c2: Circle | r = R_air; angle = 90
    c3: Circle | r = R_inf; angle = 90
    fin: Finalize "Form Union"

Materials
  mat1: Common "Air" on domains 1-4
    def "Basic"
      thermalexpansioncoefficient = alpha_p(pA,T)
      molarmass = 0.02897[kg/mol]
      bulkviscosity = muB(T)
      relpermeability = 1
      relpermittivity = 1
      dynamicviscosity = eta(T)
      ratioofspecificheat = 1.4
      electricconductivity = 0[S/m]
      heatcapacity = Cp(T)
      density = rho(pA,T)
      thermalconductivity = k(T)
      soundspeed = cs(T)
      eta: Piecewise | arg = T; pieces = {200.0, 1600.0, -8.38278E-7+8.35717342E-8*T^1-7.69429583E-11*T^2+4.6437266E-14*T^3-1.06585607E-17*T^4}; argunit = K; fununit = Pa*s
      Cp: Piecewise | arg = T; pieces = {200.0, 1600.0, 1047.63657-0.372589265*T^1+9.45304214E-4*T^2-6.02409443E-7*T^3+1.2858961E-10*T^4}; argunit = K; fununit = J/(kg*K)
      rho: Analytic | expr = pA*0.02897/R_const[K*mol/J]/T; args = {pA, T}; argunit = Pa,K; fununit = kg/m^3
      k: Piecewise | arg = T; pieces = {200.0, 1600.0, -0.00227583562+1.15480022E-4*T^1-7.90252856E-8*T^2+4.11702505E-11*T^3-7.43864331E-15*T^4}; argunit = K; fununit = W/(m*K)
      cs: Analytic | expr = sqrt(1.4*R_const[K*mol/J]/0.02897*T); args = T; argunit = K; fununit = m/s
      an1: Analytic | funcname = alpha_p; expr = -1/rho(pA,T)*d(rho(pA,T),T); args = {pA, T}; argunit = Pa,K; fununit = 1/K
      an2: Analytic "Analytic 2a" | funcname = muB; expr = 0.6*eta(T); args = T; argunit = K; fununit = Pa*s
    RefractiveIndex
      n = 1
      ki = 0
    NonlinearModel
      BA = (def.gamma+1)/2
    idealGas
      Rs = R_const/Mn
      heatcapacity = Cp(T)
      ratioofspecificheat = 1.4
      molarmass = 0.02897
      Cp: Piecewise | arg = T; pieces = {200.0, 1600.0, 1047.63657-0.372589265*T^1+9.45304214E-4*T^2-6.02409443E-7*T^3+1.2858961E-10*T^4}; argunit = K; fununit = J/(kg*K)
  mat2: Common "Copper" on domains 4
    def "Basic"
      relpermeability = 1
      electricconductivity = 5.998e7[S/m]
      thermalexpansioncoefficient = 17e-6[1/K]
      heatcapacity = 385[J/(kg*K)]
      relpermittivity = 1
      density = 8960[kg/m^3]
      thermalconductivity = 400[W/(m*K)]
    Enu "Young's modulus and Poisson's ratio"
      youngsmodulus = 110e9[Pa]
      poissonsratio = 0.35
    linzRes "Linearized resistivity"
      rho0 = 1.72e-8[ohm*m]
      alpha = 0.0039[1/K]
      Tref = 298[K]
  mat3: Common "Composite" on domains 1
    def "Basic"
      relpermeability = mu_r
      heatcapacity = 900[J/(kg*K)]
      thermalconductivity = 238[W/(m*K)]
      electricconductivity = sigma
      relpermittivity = 1
      thermalexpansioncoefficient = 23e-6[1/K]
      density = 2700[kg/m^3]
    Enu "Young's modulus and Poisson's ratio"
      youngsmodulus = 70e9[Pa]
      poissonsratio = 0.33
    Murnaghan
      l = -2.5e11[Pa]
      m = -3.3e11[Pa]
      n = -3.5e11[Pa]
    Lame "Lamé parameters"
      lambLame = 5.1e10[Pa]
      muLame = 2.6e10[Pa]

Physics
  mf: InductionCurrents "Magnetic Fields" on all domains
    dependent variable A = {Ar, Aphi, Az}
    al1: AmperesLaw "Ampère's Law 1" (default)
    axi1: AxialSymmetry (default)
    mi1: MagneticInsulation (default)
    init1: init "Initial Values 1" (default)
    coil1: Coil on domains 4 | ConductorModel = Multi; CoilName = coil; ICoil = I/2
    pmc1: PerfectMagneticConductor on boundaries 2, 7, 8

Mesh
  mesh1 "Mesh"
    size: MeshSizeDefault | hmax = 7.0E-4; hmin = 1.4E-6; hcurve = 0.2; hauto = 1
    bl1: BndLayer "Boundary Layers 1" on domains 1 | sharpcorners = trim
      blp: BndLayerProp "Boundary Layer Properties" on boundaries 4, 6
    ftri1: FreeTri "Free Triangular 1" on domains 2, 4
    map1: Map "Mapped 1" on remaining entities

Studies
  std1 "Study 1"
    freq: Frequency "Frequency Domain" | plist = f

Solver configurations
  sol1 "Solution 1" (study std1)
    v1: Variables "Dependent Variables 1"
    s1: Stationary "Stationary Solver 1"
      dDef: Direct
      p1: Parametric | pname = freq; plistarr = f; punit = Hz; pcontinuationmode = no
      fc1: FullyCoupled | linsolver = dDef

Datasets
  dset1: Solution "Study 1/Solution 1 (full domain)" | solution = sol1
  dset2: Solution "Study 1/Solution 1 (plate)" on domains 1 | solution = sol1
  cpt1: CutPoint2D | data = dset1; pointx = 0; pointy = h_coil

Derived values
  int1: IntSurface "Induced Power" on domains 1
    data = dset2
    table = tbl2
    expr = mf.normJ^2/sigma
    unit = W
    intvolume = on
  pev1: EvalPoint "Magnetic Flux (center)"
    data = cpt1
    table = tbl3
    expr = mf.normB
    unit = T
    descr = Magnetic flux density norm

Tables
  tbl2: Table
    // Surface Integration 1
    freq (Hz) | mf.normJ^2/sigma (W) | mf.normJ^2/sigma (W)
    250000 | 0.275561 | 0.0688904
  tbl3: Table
    // Point Evaluation 1
    freq | Magnetic flux density, z component (T), Point: (0, 0.01) | Magnetic flux density norm (T), Point: (0, 0.01)
    250000 | 8.51829e-05-9.24307e-06i | 8.5683e-05

Plots
  pg1: PlotGroup2D "Magnetic Flux Density Norm (mf)" | data = dset1; dataisaxisym = on
    surf1: Surface | expr = mf.normB
    str1: Streamline on boundaries 1-14
      expr = {mf.Br, mf.Bz}
      udist = 0.03
      pointtype = arrow
      arrowlength = logarithmic
      col1: Color "Color Expression 1" | expr = log10(mf.normB)
      filt1: Filter | expr = !isScalingSystemDomain
    con1: Contour | expr = r*mf.Aphi; levelrounding = off
      filt1: Filter | expr = !isScalingSystemDomain
  pg2: PlotGroup2D "2D Plot Group 2" on domains 1 | data = dset1
    surf1: Surface | expr = mf.normJ; descr = Current density norm